# Constants
# Pyramid
pl := 60  # Length
pw := 60  # Width
ptl := 10  # Top Length
ptw := 10  # Top Width
ph := 24.5  # Height
ptfo := 25  # Top Front Offset (Horizontal distance between base front and top front)
pby := 113  # Base Y-Coordinate
pfd := 43  # Front Diagonal
# Nope:
pbd := 43  # Back Diagonal
# Eye
ey := 170  # Y-Coordinate
ed := 110  # Horizontal distance from eye to the base of the pyramid
# Monitor
ml := 104  # Length
mw := 59.5  # Width
mpfo := 0  # Monitor-Pyramid Front Offset
my := 158  # Y-Coordinate (height above ground)
mr := [1920; 1080]  # Monitor Resolution
# Quick Maffs
# Pyramid
pfα := atan(ph/ptfo) = 44.4213 deg  # Front Angle
psα := atan(ph/(pw/2 - ptw/2)) = 44.4213 deg  # Side Angle
# Eye
etpbα := atan((ey - pby)/ed) = 27.3924 deg  # Eye to Pyramid Base Angle
# Eye to Pyramid Top Angle
etptα := atan((ey - (pby + ph))/(ed + ptfo)) = 13.5359 deg
pbα := etpbα + 2*((π/2 - pfα) - etpbα) = 63.7651 deg  # Projected Base Angle
pbα := etptα + 2*((π/2 - pfα) - etptα) = 77.6216 deg  # Projected Top Angle
# Monitor
ppcm := [mr[0]/ml; mr[1]/mw] = [18.4615; 18.1513]  # Pixels per cm (those 2 numbers should always be approximately equal, because usually pixels are squares)
# Output
TEST := [0, 4, 2; 1, 2, 4; 3, 3, 2; 0, 1, 1; 2, 4, -1; 1, 6, 7; 4, 5, 6; -1, 2, 3]
TESTF(t) := [2*t; t; sin(t)]
# [3D plot: TEST, TESTF(t)]
